*Heading
** Job name: Job-3 Model name: Model-1
** Generated by: Abaqus/CAE 2023
*Preprint, echo=NO, model=NO, history=NO, contact=NO
**
** PARTS
**
*Part, name=bar
*End Part
**
**
** ASSEMBLY
**
*Assembly, name=Assembly
**
*Instance, name=bar-1, part=bar
*Node
      1,           0.,           0., 0.00700000022
      2,           0., 0.0364999995, 0.00700000022
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*Element, type=C3D4
    1,  4220,  4221,  4222,  4223
    2,  4224,  4225,  2238,  4226
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*Nset, nset=Set-1, generate
     1,  10795,      1
*Elset, elset=Set-1, generate
     1,  51933,      1
** Section: Section-1
*Solid Section, elset=Set-1, material=metal
,
*End Instance
**
*Node
      1, 4.28626382e-19,  0.144999996,           0.
*Nset, nset=Set-1, instance=bar-1
   1,   9,  10,  11,  12,  13
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*Elset, elset=Set-1, instance=bar-1
  4880,  4992,  5006,  5871,  5880,  5885
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*Nset, nset=Set-2, instance=bar-1
    8,  212,  213,  214,  215,  216
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*Elset, elset=Set-2, instance=bar-1
    37,   491,   581,   615,   865,   981
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*Nset, nset=Set-11
 1,
*Nset, nset=m_Set-10
 1,
*Elset, elset=_s_Surf-1_S3, internal, instance=bar-1
    37,   491,   581,   615,   865,   981
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*Elset, elset=_s_Surf-1_S1, internal, instance=bar-1
  5059,  6414,  8803, 17488, 17500, 17665, 21880, 23482, 24765, 30054, 30407, 30438, 30576, 31794
*Elset, elset=_s_Surf-1_S4, internal, instance=bar-1
  9837, 12214, 12244, 16475, 17487, 18670, 22568, 24002, 29924, 30259, 32861, 35882, 37824
*Elset, elset=_s_Surf-1_S2, internal, instance=bar-1
 12402, 16514, 17489, 29200, 29268, 29425, 29465, 30628, 30688, 30758, 30916, 31580, 35869
*Surface, type=ELEMENT, name=s_Surf-1
_s_Surf-1_S3, S3
_s_Surf-1_S1, S1
_s_Surf-1_S4, S4
_s_Surf-1_S2, S2
** Constraint: Constraint-1
*Coupling, constraint name=Constraint-1, ref node=m_Set-10, surface=s_Surf-1
*Kinematic
*End Assembly
*Amplitude, name=Amp-1
             0.,              0.,              1.,           0.001
**
** MATERIALS
**
*Material, name=metal
*Density
7800.,
*Depvar, delete=3
     3,
*User Material, constants=14
 1.08e+11, 0.3, 300.0e6, 200.0e6, 10.0, 1.5, 1.0, 2.25
 0.001, 0.04, 0.4, 0.1, 0.0045, 0.3
** ----------------------------------------------------------------
**
** STEP: Step-1
**
*Step, name=Step-1, nlgeom=YES
*Dynamic, Explicit
, 1.
*Bulk Viscosity
0.06, 1.2
**
** BOUNDARY CONDITIONS
**
** Name: BC-1 Type: ¶ԳƯ·´¶ԳƯͪȫ¹̶¨
*Boundary
Set-1, ENCASTRE
** Name: BC-2 Type: λ҆/ת½Ǎ
*Boundary, amplitude=Amp-1
Set-11, 2, 2, 1.
**
** OUTPUT REQUESTS
**
** FIELD OUTPUT: F-Output-1
**
*Output, field, time interval=0.002
*Node Output
A, U, V
*Element Output, directions=YES
EVF, LE, PE, PEEQ, PEEQVAVG, PEVAVG, S, SDV, STATUS, SVAVG, TEMP
**
** HISTORY OUTPUT: H-Output-2
**
*Output, history, time interval=0.002
*Node Output, nset=m_Set-10
RF2,
*Energy Output
ALLAE, ALLIE, ALLKE, ALLSE, ALLWK, ETOTAL
**
** HISTORY OUTPUT: H-Output-1
**
*End Step
